// SBML level 3 version 1

model rec_mech2_5_4()
  // model units - substance: substance, time: time, volume: volume, area: area, length: length, extent: substance

  // Compartments:
  compartment kinetics_540_0_ = 1.007394e-12 volume;

  // Species:
  species PIP2_544_0_ in kinetics_540_0_ = 0.01;
  species IRSp53_dimer_546_0_ in kinetics_540_0_ = 0.0012;
  // We should note that binding to IBAR halts PIP2 lateral diffusion Zhao et al., Cell reports, 2013
  species IP_clx_548_0_ in kinetics_540_0_ = 0;
  species IRSp53_550_0_ in kinetics_540_0_ = 0.0012;
  species height_552_0_ in kinetics_540_0_ = 0;
  species Rad_554_0_ in kinetics_540_0_ = 1.648351e-18;
  // This should have diffusion proportional to the curvature formed.
  species curv_IRSp53_556_0_ in kinetics_540_0_ = 0;
  species Ipool_558_0_ in kinetics_540_0_ = 0;
  species sort_560_0_ in kinetics_540_0_ = 0;
  species IRSp53_a_562_0_ in kinetics_540_0_ = 0;
  species Cdc42_564_0_ in kinetics_540_0_ = 0.01;
  species Eps8_566_0_ in kinetics_540_0_ = 0.00083;
  species IRSp53_m_568_0_ in kinetics_540_0_ = 0;
  species curv_570_0_ in kinetics_540_0_ = 0;
  species cPIP2_572_0_ in kinetics_540_0_ = 0;
  species cip2_574_0_ in kinetics_540_0_ = 0;
  species cip3_576_0_ in kinetics_540_0_ = 0;
  species curv_pip_578_0_ in kinetics_540_0_ = 0;
  species detach_580_0_ in kinetics_540_0_ = 0;
  species Enz2_cplx_591_0_ in kinetics_540_0_ = 0;
  species Enz_cplx_594_0_ in kinetics_540_0_ = 0;
  species Enz_cplx_597_0_ in kinetics_540_0_ = 0;
  species Enz_cplx_600_0_ in kinetics_540_0_ = 0;

  // Reactions:
  // kinetics_540_0_ * Reac2_586_0__Kf * IRSp53_a_562_0_*Eps8_566_0_^2-kinetics_540_0_ * Reac2_586_0__Kb * IRSp53_m_568_0_
  Reac2_586_0_: IRSp53_a_562_0_ + 2 Eps8_566_0_ -> IRSp53_m_568_0_; kinetics_540_0_*Reac2_586_0__Kf*IRSp53_a_562_0_*Eps8_566_0_^2 - kinetics_540_0_*Reac2_586_0__Kb*IRSp53_m_568_0_;
    Reac2_586_0__Kf = 1000000 sq_litre_per_mmole_sq_per_second; Reac2_586_0__Kb = 0.01 per_second;
  // kinetics_540_0_ * Reac_588_0__Kf * IRSp53_dimer_546_0_*Cdc42_564_0_^2-kinetics_540_0_ * Reac_588_0__Kb * IRSp53_a_562_0_
  // sudhaharan et al., Kd
  Reac_588_0_: IRSp53_dimer_546_0_ + 2 Cdc42_564_0_ -> IRSp53_a_562_0_; kinetics_540_0_*Reac_588_0__Kf*IRSp53_dimer_546_0_*Cdc42_564_0_^2 - kinetics_540_0_*Reac_588_0__Kb*IRSp53_a_562_0_;
    Reac_588_0__Kf = 100000000 sq_litre_per_mmole_sq_per_second; Reac_588_0__Kb = 4 per_second;
  // kinetics_540_0_ * Reac1_611_0__Kf * cip2_574_0_
  Reac1_611_0_: cip2_574_0_ => curv_IRSp53_556_0_; kinetics_540_0_*Reac1_611_0__Kf*cip2_574_0_;
    Reac1_611_0__Kf = 0.2 per_second;
  // kinetics_540_0_ * ( k1 * IRSp53_m_568_0_*curv_570_0_ - k2 * Enz2_cplx_591_0_ )
  Enz_590_0_Complex_formation_: IRSp53_m_568_0_ + curv_570_0_ -> Enz2_cplx_591_0_; kinetics_540_0_*(Enz_590_0_Complex_formation__k1*IRSp53_m_568_0_*curv_570_0_ - Enz_590_0_Complex_formation__k2*Enz2_cplx_591_0_);
    Enz_590_0_Complex_formation__k1 = 5000000 litre_per_mmole_per_second; Enz_590_0_Complex_formation__k2 = 40 per_second;
  // kinetics_540_0_ * k3*Enz2_cplx_591_0_
  Enz_590_0_Product_formation_: Enz2_cplx_591_0_ => curv_570_0_ + curv_IRSp53_556_0_; kinetics_540_0_*Enz_590_0_Product_formation__k3*Enz2_cplx_591_0_;
    Enz_590_0_Product_formation__k3 = 10 per_second;
  // kinetics_540_0_ * ( k1 * PIP2_544_0_*curv_pip_578_0_ - k2 * Enz_cplx_594_0_ )
  Enz_593_0_Complex_formation_: PIP2_544_0_ + curv_pip_578_0_ -> Enz_cplx_594_0_; kinetics_540_0_*(Enz_593_0_Complex_formation__k1*PIP2_544_0_*curv_pip_578_0_ - Enz_593_0_Complex_formation__k2*Enz_cplx_594_0_);
    Enz_593_0_Complex_formation__k1 = 5000000000 litre_per_mmole_per_second; Enz_593_0_Complex_formation__k2 = 4 per_second;
  // kinetics_540_0_ * k3*Enz_cplx_594_0_
  Enz_593_0_Product_formation_: Enz_cplx_594_0_ => curv_pip_578_0_ + cPIP2_572_0_; kinetics_540_0_*Enz_593_0_Product_formation__k3*Enz_cplx_594_0_;
    Enz_593_0_Product_formation__k3 = 1 per_second;
  // kinetics_540_0_ * ( k1 * sort_560_0_*curv_IRSp53_556_0_ - k2 * Enz_cplx_597_0_ )
  Enz_596_0_Complex_formation_: sort_560_0_ + curv_IRSp53_556_0_ -> Enz_cplx_597_0_; kinetics_540_0_*(Enz_596_0_Complex_formation__k1*sort_560_0_*curv_IRSp53_556_0_ - Enz_596_0_Complex_formation__k2*Enz_cplx_597_0_);
    Enz_596_0_Complex_formation__k1 = 5000 litre_per_mmole_per_second; Enz_596_0_Complex_formation__k2 = 4 per_second;
  // kinetics_540_0_ * k3*Enz_cplx_597_0_
  Enz_596_0_Product_formation_: Enz_cplx_597_0_ => sort_560_0_ + cip2_574_0_; kinetics_540_0_*Enz_596_0_Product_formation__k3*Enz_cplx_597_0_;
    Enz_596_0_Product_formation__k3 = 1 per_second;
  // kinetics_540_0_ * ( k1 * curv_IRSp53_556_0_*detach_580_0_ - k2 * Enz_cplx_600_0_ )
  Enz_599_0_Complex_formation_: curv_IRSp53_556_0_ + detach_580_0_ -> Enz_cplx_600_0_; kinetics_540_0_*(Enz_599_0_Complex_formation__k1*curv_IRSp53_556_0_*detach_580_0_ - Enz_599_0_Complex_formation__k2*Enz_cplx_600_0_);
    Enz_599_0_Complex_formation__k1 = 250 litre_per_mmole_per_second; Enz_599_0_Complex_formation__k2 = 0.2 per_second;
  // kinetics_540_0_ * k3*Enz_cplx_600_0_
  Enz_599_0_Product_formation_: Enz_cplx_600_0_ => IRSp53_m_568_0_ + detach_580_0_; kinetics_540_0_*Enz_599_0_Product_formation__k3*Enz_cplx_600_0_;
    Enz_599_0_Product_formation__k3 = 0.05 per_second;

  // Unit definitions:
  unit volume = litre;
  unit substance = 1e-3 mole;
  unit length = metre;
  unit area = metre^2;
  unit time = second;
  unit sq_litre_per_mmole_sq_per_second = litre^2 / ((1e-3 mole)^2 * second);
  unit per_second = 1 / second;
  unit litre_per_mmole_per_second = litre / (1e-3 mole * second);
end
